Model:
  DynamicsEngine:
    SimbodyEngine: gravity=(0 -10 0)
      BodySet:
        SimbodyBody ground: mass=0 mass_center=(0 0 0) inertia=(0 0 0 0 0 0 0 0 0)
        SimbodyBody Pendulum: mass=2 mass_center=(0 -0.5 0) inertia=(1 0 0 0 1 0 0 0 1)
      JointSet:
        SimbodyJoint GroundJoint: bodies=(ground Pendulum) location_in_parent=(0 0 0) location_in_child=(0 0.5 0)
          DofSet:
            SimbodyRotationDof r1: coordinate=PendulumAxis axis=(0 0 1)
              Value
      SimbodyCoordinate PendulumAxis: default_value=0 initial_value=0 tolerance=0 stiffness=0
          range=(-999999.9 999999.9) clamped=true restraint_active=true
      SpeedSet:
        SimbodySpeed PendulumAxis_u: default_value=0 coordinate=PendulumAxis
  ActuatorSet:
    Force f1: body_A=Pendulum point_A=(0 0 0) direction_A=(1 0 0) body_B=ground point_B=(0 -0.5 0) optimal_force=30.21
